# Title: Native operators and document structure
## Области документа, математические операторы и ОДУ
# [area: Вложенные определения]
# Текст внутри области
a := 5
# [area: Скрытые исходные данные]
hidden := 13
hidden = 13
a + 2 = 7
global_value = 11
global_value ≡ 11
A := [1, 2; 3, 4]
transpose(transpose(A)[:, 0]) = [1, 2]
[1; 0; 0]×[0; 1; 0] = [0; 0; 1]
sum([1; 2; 3]) = 6
product(i, i = 1 .. 5) = 120
5! = 120
nthroot(32, 5) = 2
log(2, 8) = 3
conj(2.0 + 3.0*1i) = 2 - 3i
|3.0 + 4.0*1i| = 5
strlen("Mathcad") = 7
## Решение y′ = y, y(0) = 1
Given
d^1/dt^1(y(t)) == y(t)
y(0) == 1
y := Odesolve(t, 1)
y(1) = 2.71829
