# Title: Cam with translating roller follower
## Кулачок с поступательным роликовым толкателем
# Расчёт по конструкциям страниц 133–136; длины в метрах, углы в радианах.
h := 0.015
theta_max := 30*deg
fr := 220*deg
fu := 115*deg
fc := 75*deg
fd := fr - fu - fc
p1 := fu/2
p2 := fu
p3 := fu + fd
p4 := fu + fd + fc/2
p5 := fr
am1 := 1
am2 := 1
knots := [
    0;
    0.0001;
    p1;
    p1 + 0.0001;
    p2;
    p2 + 0.0001;
    p3;
    p3 + 0.0001;
    p4;
    p4 + 0.0001;
    p5;
    p5 + 0.0001;
    2*π
]
velocity_knots := [0; p1; p2; p3; p4; p5; 2*π]
## Единичные ускорения
acceleration_values := [0; am1; am1; -am1; -am1; 0; 0; -am2; -am2; am2; am2; 0; 0]
a(t) := linterp(knots, acceleration_values, t)
integrated_v(t) := integral(a(q), q = 0 .. t)
velocity_values := [0; integrated_v(p1); 0; 0; integrated_v(p4); 0; 0]
v(t) := linterp(velocity_knots, velocity_values, t)
s(t) := integral(v(q), q = 0 .. t)
s(130*deg) = 1.00714
s(2*π) = 0.578839
## Нормировка на заданный ход
am1 := am1*h/s(fu)
am2 := am2*h/(s(fu) - s(fr))
acceleration_values := [0; am1; am1; -am1; -am1; 0; 0; -am2; -am2; am2; am2; 0; 0]
a(t) := linterp(knots, acceleration_values, t)
integrated_v(t) := integral(a(q), q = 0 .. t)
velocity_values := [0; integrated_v(p1); 0; 0; integrated_v(p4); 0; 0]
v(t) := linterp(velocity_knots, velocity_values, t)
s(t) := integral(v(q), q = 0 .. t)
s(130*deg) = 0.015
s(2*π) = -6.60885e-7
t := 0, 0.02 .. 2*π
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## Радиус и смещение: решающий блок
s0 := h
e := 0
Given
tan(theta_max) == (v(p1) + e)/(s0 + s(p1))
tan(theta_max) == (-v(p4) - e)/(s0 + s(p4))
solution := Find(s0, e)
s0 := solution[0]
e := solution[1]
r0 := sqrt(s0^2 + e^2)
s0 = 0.0252931
e = 0.0039864
r0 = 0.0256054
pressure_angle(t) := atan((v(t) + e)/(s0 + s(t)))
pressure_angle(p1)/deg = 30
pressure_angle(p4)/deg = -30
tangent_left(y) := -e - tan(theta_max)*(y + s0)
tangent_right(y) := -e + tan(theta_max)*(y + s0)
y := -s0, -s0 + 0.001 .. h
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## Центровой и конструктивный профили, ролик и толкатель
roller_radius := 0.01
position := 0*deg
xA(t) := e*cos(t)
yA(t) := e*sin(t)
xB(t) := xA(t) + s0*cos(t + π/2)
yB(t) := yA(t) + s0*sin(t + π/2)
xC(t) := xB(t) + s(t)*cos(t + π/2)
yC(t) := yB(t) + s(t)*sin(t + π/2)
xD(t) := xC(t) - roller_radius*cos(t + π/2 - pressure_angle(t))
yD(t) := yC(t) - roller_radius*sin(t + π/2 - pressure_angle(t))
xR(t) := xC(position) + roller_radius*cos(t)
yR(t) := yC(position) + roller_radius*sin(t)
X := [xC(position); xC(position) - h*sin(position)]
Y := [yC(position); yC(position) + h*cos(position)]
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xD(0) = 0.00242954
yD(0) = 0.0154151
