# Title: Compressor mechanism
## Компрессор: кинематика, инерция, давление и работа
# По конструкциям и исходным данным страниц 112–116.
Vavg := 3.2
n1 := 20
ratio := 4
mass2 := 8
mass3 := 10
J2 := 0.22
gravity := 10
diameter := 0.2
pmax := 500000
l1 := Vavg/(4*n1)
l2 := ratio*l1
center := 0.33*l2
probe := 120*deg
l1 = 0.04
l2 = 0.16
## Положение и кинематические передаточные функции
phi1(φ) := π/2 - φ
xB(φ) := l1*cos(phi1(φ))
yB(φ) := l1*sin(phi1(φ))
phi2(φ) := acos(-xB(φ)/l2)
yC(φ) := yB(φ) + l2*sin(phi2(φ))
xS(φ) := xB(φ) + center*cos(phi2(φ))
yS(φ) := yB(φ) + center*sin(phi2(φ))
v_xB(φ) := d^1/dφ^1(xB(φ))
a_xB(φ) := d^2/dφ^2(xB(φ))
v_yB(φ) := d^1/dφ^1(yB(φ))
a_yB(φ) := d^2/dφ^2(yB(φ))
v_yC(φ) := d^1/dφ^1(yC(φ))
a_yC(φ) := d^2/dφ^2(yC(φ))
v_xS(φ) := d^1/dφ^1(xS(φ))
a_xS(φ) := d^2/dφ^2(xS(φ))
v_yS(φ) := d^1/dφ^1(yS(φ))
a_yS(φ) := d^2/dφ^2(yS(φ))
v_phi2(φ) := d^1/dφ^1(phi2(φ))
a_phi2(φ) := d^2/dφ^2(phi2(φ))
xB(probe) = 0.034641
yB(probe) = -0.02
yC(probe) = 0.136205
xS(probe) = 0.0232095
yS(probe) = 0.0315476
v_yC(probe) = -0.0302057
a_yC(probe) = 0.0249955
v_phi2(probe) = -0.128037
a_phi2(probe) = -0.218131
X := [0; xB(probe); xS(probe); 0]
Y := [0; yB(probe); yS(probe); yC(probe)]
φ := 0, 0.05 .. 2*π
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## Приведённый момент инерции
inertia(φ) := J2*v_phi2(φ)^2 + mass2*(v_xS(φ)^2 + v_yS(φ)^2) + mass3*v_yC(φ)^2
inertia(probe) = 0.0229728
## Табличная индикаторная диаграмма и давление
sbc := [0.2; 0.3; 0.4; 0.5; 0.6; 0.7; 0.8; 0.9; 1]
pbc := [1; 0.58; 0.38; 0.26; 0.18; 0.12; 0.07; 0.03; 0]
sad := [0; 0.1; 0.2]
pad := [1; 0.3; 0]
cbc := lspline(sbc, pbc)
cad := lspline(sad, pad)
PBC(z) :=
    1 if z < 0.2
    interp(cbc, sbc, pbc, z) otherwise
PAD(z) :=
    0 if z > 0.2
    interp(cad, sad, pad, z) otherwise
stroke(φ) := (yC(0) - yC(φ))/(2*l1)
pressure(φ) :=
    pmax*PBC(stroke(φ)) if v_yC(φ) > 0
    pmax*PAD(stroke(φ)) otherwise
force(φ) := -pressure(φ)*π*diameter^2/4
moment(φ) := force(φ)*v_yC(φ) - mass2*gravity*v_yS(φ) - mass3*gravity*v_yC(φ)
stroke(probe) = 0.797438
pressure(probe) = 0
force(probe) = 0
moment(probe) = 5.67476
work(φ) := integral(moment(q), q = 0 .. φ)
work(2*π) = -418.816
-work(2*π)/(2*π) = 66.6567
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## Таблица: угол, положение, скорость, ускорение, сила
i := 0 .. 12
results[i, 0] := i*30
results[i, 1] := yC(i*30*deg)
results[i, 2] := v_yC(i*30*deg)
results[i, 3] := a_yC(i*30*deg)
results[i, 4] := force(i*30*deg)
results = [
    0, 0.2, 0, -0.05, -15708;
    30, 0.193386, -0.0243644, -0.0398005, -6206.48;
    60, 0.176205, -0.0390763, -0.0150045, 0;
    90, 0.154919, -0.04, 0.010328, 0;
    120, 0.136205, -0.0302057, 0.0249955, 0;
    150, 0.124104, -0.0156356, 0.0294815, 0;
    180, 0.12, 0, 0.03, 0;
    210, 0.124104, 0.0156356, 0.0294815, -229.299;
    240, 0.136205, 0.0302057, 0.0249955, -1117.85;
    270, 0.154919, 0.04, 0.010328, -3229.73;
    300, 0.176205, 0.0390763, -0.0150045, -9237.95;
    330, 0.193386, 0.0243644, -0.0398005, -15708;
    360, 0.2, 0, -0.05, -15708
]
