# Title: Compressor mechanism
## Компрессор: кинематика, инерция, давление и работа
# По конструкциям и исходным данным страниц 112–116.
Vavg := 3.2
n1 := 10
ratio := 4
mass2 := 8
mass3 := 10
J2 := 0.22
gravity := 10
diameter := 0.2
pmax := 500000
l1 := Vavg/(4*n1)
l2 := ratio*l1
center := 0.33*l2
probe := 120*deg
l1 = 0.08
l2 = 0.32
## Положение и кинематические передаточные функции
phi1(φ) := π/2 - φ
xB(φ) := l1*cos(phi1(φ))
yB(φ) := l1*sin(phi1(φ))
phi2(φ) := acos(-xB(φ)/l2)
yC(φ) := yB(φ) + l2*sin(phi2(φ))
xS(φ) := xB(φ) + center*cos(phi2(φ))
yS(φ) := yB(φ) + center*sin(phi2(φ))
v_xB(φ) := d^1/dφ^1(xB(φ))
a_xB(φ) := d^2/dφ^2(xB(φ))
v_yB(φ) := d^1/dφ^1(yB(φ))
a_yB(φ) := d^2/dφ^2(yB(φ))
v_yC(φ) := d^1/dφ^1(yC(φ))
a_yC(φ) := d^2/dφ^2(yC(φ))
v_xS(φ) := d^1/dφ^1(xS(φ))
a_xS(φ) := d^2/dφ^2(xS(φ))
v_yS(φ) := d^1/dφ^1(yS(φ))
a_yS(φ) := d^2/dφ^2(yS(φ))
v_phi2(φ) := d^1/dφ^1(phi2(φ))
a_phi2(φ) := d^2/dφ^2(phi2(φ))
xB(probe) = 0.069282
yB(probe) = -0.04
yC(probe) = 0.27241
xS(probe) = 0.046419
yS(probe) = 0.0630953
v_yC(probe) = -0.0604114
a_yC(probe) = 0.0499911
v_phi2(probe) = -0.128037
a_phi2(probe) = -0.218131
X := [0; xB(probe); xS(probe); 0]
Y := [0; yB(probe); yS(probe); yC(probe)]
φ := 0, 0.05 .. 2*π
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## Приведённый момент инерции
inertia(φ) := J2*v_phi2(φ)^2 + mass2*(v_xS(φ)^2 + v_yS(φ)^2) + mass3*v_yC(φ)^2
inertia(probe) = 0.0810714
## Табличная индикаторная диаграмма и давление
sbc := [0.2; 0.3; 0.4; 0.5; 0.6; 0.7; 0.8; 0.9; 1]
pbc := [1; 0.58; 0.38; 0.26; 0.18; 0.12; 0.07; 0.03; 0]
sad := [0; 0.1; 0.2]
pad := [1; 0.3; 0]
cbc := lspline(sbc, pbc)
cad := lspline(sad, pad)
PBC(z) :=
    1 if z < 0.2
    interp(cbc, sbc, pbc, z) otherwise
PAD(z) :=
    0 if z > 0.2
    interp(cad, sad, pad, z) otherwise
stroke(φ) := (yC(0) - yC(φ))/(2*l1)
pressure(φ) :=
    pmax*PBC(stroke(φ)) if v_yC(φ) > 0
    pmax*PAD(stroke(φ)) otherwise
force(φ) := -pressure(φ)*π*diameter^2/4
moment(φ) := force(φ)*v_yC(φ) - mass2*gravity*v_yS(φ) - mass3*gravity*v_yC(φ)
stroke(probe) = 0.797438
pressure(probe) = 0
force(probe) = 0
moment(probe) = 11.3495
work(φ) := integral(moment(q), q = 0 .. φ)
work(2*π) = -837.633
-work(2*π)/(2*π) = 133.313
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## Таблица: угол, положение, скорость, ускорение, сила
i := 0 .. 12
results[i, 0] := i*30
results[i, 1] := yC(i*30*deg)
results[i, 2] := v_yC(i*30*deg)
results[i, 3] := a_yC(i*30*deg)
results[i, 4] := force(i*30*deg)
results = [
    0, 0.4, 0, -0.1, -15708;
    30, 0.386772, -0.0487287, -0.0796011, -6206.48;
    60, 0.35241, -0.0781527, -0.0300089, 0;
    90, 0.309839, -0.08, 0.0206559, 0;
    120, 0.27241, -0.0604114, 0.0499911, 0;
    150, 0.248208, -0.0312713, 0.058963, 0;
    180, 0.24, 0, 0.06, 0;
    210, 0.248208, 0.0312713, 0.058963, -229.299;
    240, 0.27241, 0.0604114, 0.0499911, -1117.85;
    270, 0.309839, 0.08, 0.0206559, -3229.73;
    300, 0.35241, 0.0781527, -0.0300089, -9237.95;
    330, 0.386772, 0.0487287, -0.0796011, -15708;
    360, 0.4, 0, -0.1, -15708
]
