# Title: Polar hodograph
# Polar hodograph: angle and reaction magnitude
Fx(t) := 2 + cos(t)
Fy(t) := sin(t)
direction(t) := angle(Fx(t), Fy(t))
magnitude(t) := sqrt(Fx(t)^2 + Fy(t)^2)
angle_vector := [0; direction(1)]
radius_vector := [0; magnitude(1)]
magnitude(1) = 2.67604
t := 0, 0.03 .. 2*π
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