# Title: Automatic layout and typed notation
## Автоматическая высота: формулы, матрицы и таблицы
# Длинный текст должен переноситься по ширине поля. Длинный текст должен переноситься по ширине поля. Длинный текст должен переноситься по ширине поля. Длинный текст должен переноситься по ширине поля. Длинный текст должен переноситься по ширине поля. Длинный текст должен переноситься по ширине поля. Длинный текст должен переноситься по ширине поля. Длинный текст должен переноситься по ширине поля.
x := 2
α := 3
φ_12 := 5
ω_θ := 7
α + φ_12 + ω_θ = 15
(x + 1/(x + 2/(x + 3)))/(1 + (x^2 + 1)/(x + 1)) = 0.90625
# Текст после многоэтажной дроби
A := [
    1/1, sqrt(2), (x + 0)^1;
    2/2, sqrt(4), (x + 1)^2;
    3/3, sqrt(6), (x + 2)^3;
    4/4, sqrt(8), (x + 3)^4;
    5/5, sqrt(10), (x + 4)^5;
    6/6, sqrt(12), (x + 5)^6;
    7/7, sqrt(14), (x + 6)^7;
    8/8, sqrt(16), (x + 7)^8
]
A = [
    1, 1.41421, 2;
    1, 2, 9;
    1, 2.44949, 64;
    1, 2.82843, 625;
    1, 3.16228, 7776;
    1, 3.4641, 117649;
    1, 3.74166, 2097152;
    1, 4, 43046721
]
A[2, 0] = 1
A = [
    1, 1.41421, 2;
    1, 2, 9;
    1, 2.44949, 64;
    1, 2.82843, 625;
    1, 3.16228, 7776;
    1, 3.4641, 117649;
    1, 3.74166, 2097152;
    1, 4, 43046721
]
# Текст после таблицы
g(x) :=
    (x + 1/(x + 2/(x + 3)))/(1 + (x^2 + 1)/(x + 1)) if x > 0
    x^2 otherwise
g(2) = 0.90625
integral(x^2, x = 0 .. 1) = 0.333333
θ := 0, 0.1 .. 6.2
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# Конец документа
