# Title: Numerical acceptance
# Interpolation, matrices and differential equations
grid := [0; 1; 2; 3]
values := [0; 1; 4; 9]
linterp(grid, values, 1.5) = 2.5
lspline_coef := lspline(grid, values)
interp(lspline_coef, grid, values, 1) = 1
pspline_coef := pspline(grid, values)
interp(pspline_coef, grid, values, 1) = 1
cspline_coef := cspline(grid, values)
interp(cspline_coef, grid, values, 1) = 1
A := [2, 1; 1, 3]
B := [5; 10]
solution := lsolve(A, B)
solution = [1; 3]
wide := augment(A, A)
tall := stack(A, A)
cols(wide) = 4
rows(tall) = 4
elementwise := vectorize(A*A)
elementwise[1, 1] = 9
transpose(A)[0, 1] = 1
A[:, 1][1] = 3
zeros[3, 3] := 0
rows(zeros) = 4
root(x^2 - 2, x, 0, 2) = 1.41421
angle(0, 1)/deg = 90
D(t, y) := [y[0]]
rkfixed_solution := rkfixed([1], 0, 1, 20, D)
rkfixed_solution[20, 1] = 2.71828
Rkadapt_solution := Rkadapt([1], 0, 1, 20, D)
Rkadapt_solution[20, 1] = 2.71828
Rkadapt_solution = [
    0, 1;
    0.05, 1.05127;
    0.1, 1.10517;
    0.15, 1.16183;
    0.2, 1.2214;
    0.25, 1.28403;
    0.3, 1.34986;
    0.35, 1.41907;
    0.4, 1.49182;
    0.45, 1.56831;
    0.5, 1.64872;
    0.55, 1.73325;
    0.6, 1.82212;
    0.65, 1.91554;
    0.7, 2.01375;
    0.75, 2.117;
    0.8, 2.22554;
    0.85, 2.33965;
    0.9, 2.4596;
    0.95, 2.58571;
    1, 2.71828
]
1000*mm = 1 m
