# Title: Optimization acceptance
# Minimize, Maximize and Minerr
cost(x) := (x - 3)^2
x := 1
Given
x ≥ 0
minimum := Minimize(cost, x)
minimum = 3
benefit(x) := 10 - (x - 2)^2
x := 1
Given
x ≥ 0
maximum := Maximize(benefit, x)
maximum = 2
x := 0
Given
x == 1
x == 3
approximate := Minerr(x)
approximate = 2
