# Title: Operator grouping
2*(3 + 4) = 14
(2 + 3)*4 = 20
2 - (3 + 4) = -5
2 - (3 - 4) = 3
-(2 + 3) = -5
(2 + 3)^4 = 625
(2^3)^4 = 4096
2^(3 + 4) = 128
(-2)^2 = 4
(-2)^2 = 4
(2 + 3)! = 120
(2 + 3)/(4 + 2) = 0.833333
2/(3/4) = 2.66667
2 < 3 and 3 < 4 = 1
sqrt(2 + 3) = 2.23607
transpose([1, 2; 3, 4] + [4, 3; 2, 1]) = [5, 5; 5, 5]
