# Title: Programming acceptance
# Native Mathcad programming operators
total(n) :=
    acc ← 0
    for i ∈ 1 .. n
        acc ← acc + i
    acc
total(5) = 15
countdown(n) :=
    acc ← 0
    while n > 0
        acc ← acc + n
        n ← n - 1
    acc
countdown(5) = 15
early(n) :=
    return 7 if n > 0
    -1
early(2) = 7
stop(n) :=
    acc ← 0
    for i ∈ 1 .. n
        break if i > 3
        acc ← acc + i
    acc
stop(8) = 6
skip(n) :=
    acc ← 0
    for i ∈ 1 .. n
        continue if i == 3
        acc ← acc + i
    acc
skip(5) = 12
safe_inverse(x) :=
    try
        1/x
    on error
        99
    0
safe(x) :=
    acc ←
        try
            1/x
        on error
            99
    acc
safe(0) = 99
piecewise(x) :=
    x if x ≥ 0 and x < 1
    2*x if x ≥ 1
    -x otherwise
piecewise(2) = 4
x^2 - 1 factor → (x - 1)*(x + 1)
