# Title: Range result tables
# Автоматическое размещение табличных результатов
grid := [0; 1; 2]
values := [0; 1; 4]
g(t) := linterp(grid, values, t)
constant(t) := 7
k := 0, 0.1 .. 2
g(k) = [0; 0.1; 0.2; 0.3; 0.4; 0.5; 0.6; 0.7; 0.8; 0.9; 1; 1.3; 1.6; 1.9; 2.2; 2.5; 2.8; 3.1; 3.4; 3.7; 4]
# Текст после интерполяционной таблицы
constant(k) = [7; 7; 7; 7; 7; 7; 7; 7; 7; 7; 7; 7; 7; 7; 7; 7; 7; 7; 7; 7; 7]
# Текст после постоянной функции на диапазоне
stop := sqrt(4)
k := 0, 0.1 .. stop
g(k) = [0; 0.1; 0.2; 0.3; 0.4; 0.5; 0.6; 0.7; 0.8; 0.9; 1; 1.3; 1.6; 1.9; 2.2; 2.5; 2.8; 3.1; 3.4; 3.7; 4]
# Текст после диапазона с неизвестной анализатору длиной
j := 0 .. 2
values[j] = [0; 1; 4]
# Текст после таблицы индексированных значений
values = [0; 1; 4]
# Текст после явного табличного вывода матрицы
