# Title: Core XMCD acceptance
# XMCD: formulas generated by Python
a := 4
a^3 + 1 = 65
A := [1, 2; 3, 4]
A[0, 1] = 2
|A| = -2
g(x) := x^3 + 2*x
g(2) = 12
x := 2
d^1/dx^1(g(x)) = 14
integral(x^2, x = 0 .. 1) = 0.333333
sum(x, x = 1 .. 5) = 15
positive(x) :=
    x if x > 0
    -x otherwise
positive(-3) = 3
i := 0 .. 4
v[i] := i^2
v[3] = 9
# Edited through the Python object model
