# Title: Solve block acceptance
# Given / Find generated by Python
x := 1
y := 1
Given
x + y == 5
x - y == 1
solution := Find(x, y)
solution = [3; 2]
x := 2
Given
x^2 == p
positive_root(p) := Find(x)
positive_root(9) = 3
